# OpenSim document version 30000
InverseKinematicsTool subject01:
  constraint_weight: 20
  accuracy: 1e-5
  marker_file: subject01_Jog01.trc
  time_range: 0 0.85667
  report_errors: true
  output_motion_file: subject01_ik_Jog.mot
  IKTaskSet:
    IKMarkerTask C7_study: apply=true weight=1
    IKMarkerTask L_shoulder_study: apply=true weight=250
    IKMarkerTask r_shoulder_study: apply=true weight=250
    IKMarkerTask STRN: apply=true weight=1
    IKMarkerTask T10: apply=true weight=1
    IKMarkerTask RUPA: apply=false weight=1
    IKMarkerTask LUPA: apply=false weight=1
    IKMarkerTask r_lelbow_study: apply=true weight=250
    IKMarkerTask L_lelbow_study: apply=true weight=250
    IKMarkerTask LFRA: apply=false weight=1
    IKMarkerTask RFRA: apply=false weight=1
    IKMarkerTask r_mwrist_study: apply=true weight=150
    IKMarkerTask r_lwrist_study: apply=true weight=150
    IKMarkerTask RFIN: apply=true weight=1
    IKMarkerTask L_mwrist_study: apply=true weight=150
    IKMarkerTask L_lwrist_study: apply=true weight=150
    IKMarkerTask LFIN: apply=true weight=1
    IKMarkerTask RHJC_study: apply=true weight=350
    IKMarkerTask LHJC_study: apply=true weight=350
    IKMarkerTask r.ASIS_study: apply=true weight=800
    IKMarkerTask L.ASIS_study: apply=true weight=800
    IKMarkerTask r.PSIS_study: apply=true weight=800
    IKMarkerTask L.PSIS_study: apply=true weight=800
    IKMarkerTask r_ankle_study: apply=true weight=200
    IKMarkerTask l_ankle_study: apply=true weight=200
    IKMarkerTask L_calc_study: apply=true weight=250
    IKMarkerTask L_toe_study: apply=true weight=350
    IKMarkerTask r_calc_study: apply=true weight=250
    IKMarkerTask r_toe_study: apply=true weight=350
    IKMarkerTask r_5meta_study: apply=true weight=100
    IKMarkerTask L_5meta_study: apply=true weight=100
    IKMarkerTask r_knee_study: apply=true weight=600
    IKMarkerTask L_knee_study: apply=true weight=600
    IKMarkerTask RFP1: apply=false weight=10
    IKMarkerTask RFP2: apply=false weight=10
    IKMarkerTask RFP3: apply=false weight=10
    IKMarkerTask RFM1: apply=false weight=10
    IKMarkerTask RFM2: apply=false weight=10
    IKMarkerTask RFM3: apply=false weight=10
    IKMarkerTask RFA1: apply=false weight=100
    IKMarkerTask RFA2: apply=false weight=100
    IKMarkerTask RFA3: apply=false weight=100
    IKMarkerTask LFP1: apply=false weight=10
    IKMarkerTask LFP2: apply=false weight=10
    IKMarkerTask LFP3: apply=false weight=10
    IKMarkerTask LFM1: apply=false weight=10
    IKMarkerTask LFM2: apply=false weight=10
    IKMarkerTask LFM3: apply=false weight=10
    IKMarkerTask LFA1: apply=false weight=100
    IKMarkerTask LFA2: apply=false weight=100
    IKMarkerTask LFA3: apply=false weight=100
    IKMarkerTask RTP1: apply=false weight=10
    IKMarkerTask RTP2: apply=false weight=10
    IKMarkerTask RTP3: apply=false weight=10
    IKMarkerTask RTA1: apply=true weight=50
    IKMarkerTask RTA2: apply=false weight=10
    IKMarkerTask RTA3: apply=false weight=10
    IKMarkerTask LTP1: apply=false weight=10
    IKMarkerTask LTP2: apply=false weight=10
    IKMarkerTask LTP3: apply=false weight=10
    IKMarkerTask LTA1: apply=true weight=50
    IKCoordinateTask subtalar_angle_r: apply=true weight=1000 value_type=default_value value=0
    IKCoordinateTask mtp_angle_r: apply=true weight=1000 value_type=default_value value=0
    IKCoordinateTask subtalar_angle_l: apply=true weight=1000 value_type=default_value value=0
    IKCoordinateTask mtp_angle_l: apply=true weight=1000 value_type=default_value value=0
